// SBML level 2 version 1
// Created by Meiya on 2013-4-21 0:4

model Oryza_Sativa()
  // Rice model - 8 Jun 2012

  // Compartments:
  compartment cell;

  // Species:
  species a_2iPropMal_p_ in cell = 1/cell;
  species NADH_m_ in cell = 1/cell;
  species ADP_m_ in cell = 1/cell;
  species ADP_p_ in cell = 1/cell;
  species Dhooro_c_ in cell = 1/cell;
  species Steat_c_ in cell = 1/cell;
  species His_ol_p_ in cell = 1/cell;
  species Fruct16bP_p_ in cell = 1/cell;
  species a_3iPropMal_p_ in cell = 1/cell;
  species a_2PhosGlyco_p_ in cell = 1/cell;
  species Glycolate_p_ in cell = 1/cell;
  species Palmt_c_ in cell = 1/cell;
  species a_2k3MetVal_p_ in cell = 1/cell;
  species redferr_p_ in cell = 1/cell;
  species m_Ino_c_ in cell = 1/cell;
  species ATP_c_ in cell = 1/cell;
  species Orot_p_ in cell = 1/cell;
  species Conalc_c_ in cell = 1/cell;
  species ATP_m_ in cell = 1/cell;
  species DHooro_c_ in cell = 1/cell;
  species D_ery4P_p_ in cell = 1/cell;
  species c_Aco_m_ in cell = 1/cell;
  species Xu5P_p_ in cell = 1/cell;
  species His_al_p_ in cell = 1/cell;
  species H__c_ in cell = 1/cell;
  species a_Glc_p_ in cell = 1/cell;
  species Indole_p_ in cell = 1/cell;
  species $pi_e_ in cell = 1/cell;
  species Anth_p_ in cell = 1/cell;
  species Pr_FormCarb_p_ in cell = 1/cell;
  species pi_m_ in cell = 1/cell;
  species H2O2_c_ in cell = 1/cell;
  species a_Glc6P_p_ in cell = 1/cell;
  species NAceGlutP_c_ in cell = 1/cell;
  species a_3DHQuin_p_ in cell = 1/cell;
  species Lys_p_ in cell = 1/cell;
  species GABA_m_ in cell = 1/cell;
  species L_HisP_p_ in cell = 1/cell;
  species a_Glc6P_c_ in cell = 1/cell;
  species Shikimate_p_ in cell = 1/cell;
  species Lys_c_ in cell = 1/cell;
  species AICAR_p_ in cell = 1/cell;
  species GludiS_p_ in cell = 1/cell;
  species Pr_ATP_p_ in cell = 1/cell;
  species O2_p_ in cell = 1/cell;
  species TAG_c_ in cell = 1/cell;
  species pyrdeh1_m_ in cell = 1/cell;
  species $Starch_e_ in cell = 1/cell;
  species a_2iProp3Succ_p_ in cell = 1/cell;
  species $a_Glc_e_ in cell = 1/cell;
  species cysttn_p_ in cell = 1/cell;
  species D_Glu_d_Lac6P_c_ in cell = 1/cell;
  species pyrdeh1_p_ in cell = 1/cell;
  species UDP_Glc_c_ in cell = 1/cell;
  species Glycerate_p_ in cell = 1/cell;
  species Fumr_p_ in cell = 1/cell;
  species Ala_c_ in cell = 1/cell;
  species Olet_p_ in cell = 1/cell;
  species $Ala_e_ in cell = 1/cell;
  species a_1_ocdoP_p_ in cell = 1/cell;
  species Isocit_c_ in cell = 1/cell;
  species Acetate_c_ in cell = 1/cell;
  species $Lactate_e_ in cell = 1/cell;
  species Acetate_m_ in cell = 1/cell;
  species Ala_m_ in cell = 1/cell;
  species L_23_DHDC_p_ in cell = 1/cell;
  species Thdpico_p_ in cell = 1/cell;
  species Succ_c_ in cell = 1/cell;
  species HCO3_c_ in cell = 1/cell;
  species OAA_c_ in cell = 1/cell;
  species UDP_Xyl_c_ in cell = 1/cell;
  species D_Sed_7P_c_ in cell = 1/cell;
  species Pr_BulSylFormP_p_ in cell = 1/cell;
  species OAA_m_ in cell = 1/cell;
  species photon_p_ in cell = 1/cell;
  species OAA_p_ in cell = 1/cell;
  species SGly3P_c_ in cell = 1/cell;
  species Acetald_c_ in cell = 1/cell;
  species a_510MetTHF_p_ in cell = 1/cell;
  species N_Ace_L_glutt_c_ in cell = 1/cell;
  species $photon_e_ in cell = 1/cell;
  species Fruct16bP_c_ in cell = 1/cell;
  species N10FormTHF_m_ in cell = 1/cell;
  species Arogenate_p_ in cell = 1/cell;
  species ppi_m_ in cell = 1/cell;
  species a_510MetTHF_m_ in cell = 1/cell;
  species a_4CoumShiki_c_ in cell = 1/cell;
  species Ade_Succ_p_ in cell = 1/cell;
  species a_2Acelac_p_ in cell = 1/cell;
  species D_myo3mP_c_ in cell = 1/cell;
  species a_23dh3MetVal_p_ in cell = 1/cell;
  species Ethanol_c_ in cell = 1/cell;
  species NAD__m_ in cell = 1/cell;
  species Olet_c_ in cell = 1/cell;
  species Ru5P_p_ in cell = 1/cell;
  species $Ethanol_e_ in cell = 1/cell;
  species NADH_p_ in cell = 1/cell;
  species a_6_P_gluco_c_ in cell = 1/cell;
  species GTP_c_ in cell = 1/cell;
  species PropCoA_c_ in cell = 1/cell;
  species Malate_p_ in cell = 1/cell;
  species AcrCoA_c_ in cell = 1/cell;
  species GTP_p_ in cell = 1/cell;
  species Malate_m_ in cell = 1/cell;
  species CoumAld_c_ in cell = 1/cell;
  species Gluta_p_ in cell = 1/cell;
  species a_510MeteTHF_p_ in cell = 1/cell;
  species Ole_CoA_c_ in cell = 1/cell;
  species ind3Ace_GP_p_ in cell = 1/cell;
  species Lole_CoA_c_ in cell = 1/cell;
  species GDP_c_ in cell = 1/cell;
  species QH2_m_ in cell = 1/cell;
  species a_Glc1P_c_ in cell = 1/cell;
  species GDP_p_ in cell = 1/cell;
  species Met_p_ in cell = 1/cell;
  species Steat_p_ in cell = 1/cell;
  species Sucr6P_c_ in cell = 1/cell;
  species D_ery4P_c_ in cell = 1/cell;
  species Xu5P_c_ in cell = 1/cell;
  species Met_c_ in cell = 1/cell;
  species L_Glut_5P_c_ in cell = 1/cell;
  species a_6_P_gluco_p_ in cell = 1/cell;
  species a_23dhiVal_p_ in cell = 1/cell;
  species Hydpyr_c_ in cell = 1/cell;
  species Gln_c_ in cell = 1/cell;
  species $Gln_e_ in cell = 1/cell;
  species Cys_c_ in cell = 1/cell;
  species Adenosine_c_ in cell = 1/cell;
  species citrulline_c_ in cell = 1/cell;
  species pi_c_ in cell = 1/cell;
  species Gln_p_ in cell = 1/cell;
  species Palmt_p_ in cell = 1/cell;
  species ammonia_c_ in cell = 1/cell;
  species Cys_p_ in cell = 1/cell;
  species $Succ_e_ in cell = 1/cell;
  species Palm_CoA_c_ in cell = 1/cell;
  species ammonia_p_ in cell = 1/cell;
  species ADP_D_Glu_p_ in cell = 1/cell;
  species oxiferr_p_ in cell = 1/cell;
  species Gly_m_ in cell = 1/cell;
  species a_1_3_DPGA_c_ in cell = 1/cell;
  species a_Glc1P_p_ in cell = 1/cell;
  species Ser_c_ in cell = 1/cell;
  species Ser_m_ in cell = 1/cell;
  species R5P_p_ in cell = 1/cell;
  species L_Asp_sAld_p_ in cell = 1/cell;
  species Pyr_c_ in cell = 1/cell;
  species L_Glut_5P_p_ in cell = 1/cell;
  species $sulfate_e_ in cell = 1/cell;
  species sulfate_c_ in cell = 1/cell;
  species UDP_Glucur_c_ in cell = 1/cell;
  species Glucuronate_c_ in cell = 1/cell;
  species a_Glc_c_ in cell = 1/cell;
  species R5P_c_ in cell = 1/cell;
  species CarmteP_c_ in cell = 1/cell;
  species Pro_p_ in cell = 1/cell;
  species sulfate_p_ in cell = 1/cell;
  species D_eryigP_p_ in cell = 1/cell;
  species UMP_p_ in cell = 1/cell;
  species GABA_c_ in cell = 1/cell;
  species Fumr_c_ in cell = 1/cell;
  species Malate_c_ in cell = 1/cell;
  species G3P_c_ in cell = 1/cell;
  species CarmteP_p_ in cell = 1/cell;
  species NAce_L_Orn_c_ in cell = 1/cell;
  species NAD__c_ in cell = 1/cell;
  species Pro_c_ in cell = 1/cell;
  species DHooro_p_ in cell = 1/cell;
  species G3P_p_ in cell = 1/cell;
  species S_Ade_L_H_c_ in cell = 1/cell;
  species Lolet_c_ in cell = 1/cell;
  species HomoCys_c_ in cell = 1/cell;
  species Shikimate_c_ in cell = 1/cell;
  species D_Sed_7P_p_ in cell = 1/cell;
  species Ile_c_ in cell = 1/cell;
  species HomoCys_p_ in cell = 1/cell;
  species Mal_CoA_p_ in cell = 1/cell;
  species Coum_Alc_c_ in cell = 1/cell;
  species Fruct6P_c_ in cell = 1/cell;
  species glucan_p_ in cell = 1/cell;
  species a_5hConif_c_ in cell = 1/cell;
  species Orot_c_ in cell = 1/cell;
  species Glycerate_c_ in cell = 1/cell;
  species Ile_p_ in cell = 1/cell;
  species Fruct6P_p_ in cell = 1/cell;
  species Val_p_ in cell = 1/cell;
  species Glycolate_c_ in cell = 1/cell;
  species HomoSer_p_ in cell = 1/cell;
  species H__p_ in cell = 1/cell;
  species D_Glu_d_Lac6P_p_ in cell = 1/cell;
  species a_2a2hButyr_p_ in cell = 1/cell;
  species cellulose_c_ in cell = 1/cell;
  species $O2_e_ in cell = 1/cell;
  species Dhooro_m_ in cell = 1/cell;
  species b_Glc6P_c_ in cell = 1/cell;
  species Val_c_ in cell = 1/cell;
  species a_3HOPropCoA_c_ in cell = 1/cell;
  species Ru5P_c_ in cell = 1/cell;
  species O2_m_ in cell = 1/cell;
  species NAD__p_ in cell = 1/cell;
  species Tyr_p_ in cell = 1/cell;
  species a_5MetTHF_p_ in cell = 1/cell;
  species NADP__c_ in cell = 1/cell;
  species His_p_ in cell = 1/cell;
  species N5PAnth_p_ in cell = 1/cell;
  species a_510MetTHF_c_ in cell = 1/cell;
  species Tyr_c_ in cell = 1/cell;
  species a_5MetTHF_c_ in cell = 1/cell;
  species a_3PG_p_ in cell = 1/cell;
  species SuccsAld_m_ in cell = 1/cell;
  species NADPH_c_ in cell = 1/cell;
  species pyrdeh2_m_ in cell = 1/cell;
  species a_3PG_c_ in cell = 1/cell;
  species IMP_p_ in cell = 1/cell;
  species UDP_L_arab_c_ in cell = 1/cell;
  species Q_m_ in cell = 1/cell;
  species Lolnt_p_ in cell = 1/cell;
  species a_2a4h6hm78dP_m_ in cell = 1/cell;
  species pyrdeh2_p_ in cell = 1/cell;
  species Glu_p_ in cell = 1/cell;
  species SinaAld_c_ in cell = 1/cell;
  species Starch_p_ in cell = 1/cell;
  species Acetate_p_ in cell = 1/cell;
  species ArgSucc_c_ in cell = 1/cell;
  species O_P_L_hmser_p_ in cell = 1/cell;
  species Glyoxylate_p_ in cell = 1/cell;
  species CoA_c_ in cell = 1/cell;
  species a_2PG_c_ in cell = 1/cell;
  species CoA_m_ in cell = 1/cell;
  species $CO2_e_ in cell = 1/cell;
  species CoA_p_ in cell = 1/cell;
  species b_Glc6P_p_ in cell = 1/cell;
  species p_Abenz_m_ in cell = 1/cell;
  species p_Abenz_c_ in cell = 1/cell;
  species Ade_5P_p_ in cell = 1/cell;
  species p_Abenz_p_ in cell = 1/cell;
  species Thr_p_ in cell = 1/cell;
  species HCO3_p_ in cell = 1/cell;
  species THF_p_ in cell = 1/cell;
  species Orot_m_ in cell = 1/cell;
  species Thr_c_ in cell = 1/cell;
  species His_c_ in cell = 1/cell;
  species a_78dhPte_m_ in cell = 1/cell;
  species Cyto_Oxi_m_ in cell = 1/cell;
  species Suc_CoA_m_ in cell = 1/cell;
  species THF_c_ in cell = 1/cell;
  species Asp_c_ in cell = 1/cell;
  species THF_m_ in cell = 1/cell;
  species L_Glut_gsAld_c_ in cell = 1/cell;
  species a_510MeteTHF_c_ in cell = 1/cell;
  species Asp_m_ in cell = 1/cell;
  species Mal_sAld_c_ in cell = 1/cell;
  species UTP_p_ in cell = 1/cell;
  species Asp_p_ in cell = 1/cell;
  species sulfite_p_ in cell = 1/cell;
  species UTP_c_ in cell = 1/cell;
  species Citrate_c_ in cell = 1/cell;
  species Orn_c_ in cell = 1/cell;
  species CaffShiki_c_ in cell = 1/cell;
  species Stea_CoA_c_ in cell = 1/cell;
  species H2O_p_ in cell = 1/cell;
  species Quinate_c_ in cell = 1/cell;
  species a_4Coum_c_ in cell = 1/cell;
  species Pyrr5Carb_c_ in cell = 1/cell;
  species H2O_m_ in cell = 1/cell;
  species a_3PhosSer_p_ in cell = 1/cell;
  species H2O_c_ in cell = 1/cell;
  species UDP_p_ in cell = 1/cell;
  species Phe_p_ in cell = 1/cell;
  species Lactate_c_ in cell = 1/cell;
  species $H2O_e_ in cell = 1/cell;
  species Succ_m_ in cell = 1/cell;
  species mPime_p_ in cell = 1/cell;
  species a_D_Glucur_1_P_c_ in cell = 1/cell;
  species UDP_c_ in cell = 1/cell;
  species H2O2_p_ in cell = 1/cell;
  species Phe_c_ in cell = 1/cell;
  species a_2kiCapr_p_ in cell = 1/cell;
  species N_CarbL_Asp_p_ in cell = 1/cell;
  species Acetald_p_ in cell = 1/cell;
  species Gly_c_ in cell = 1/cell;
  species a_3Phoshpyr_p_ in cell = 1/cell;
  species Leu_p_ in cell = 1/cell;
  species a_2oxoBut_p_ in cell = 1/cell;
  species $Sucrose_e_ in cell = 1/cell;
  species N_A_L_gluttsemald_c_ in cell = 1/cell;
  species Sucrose_c_ in cell = 1/cell;
  species Gly_p_ in cell = 1/cell;
  species Leu_c_ in cell = 1/cell;
  species Fruct26bP_c_ in cell = 1/cell;
  species Loln_CoA_c_ in cell = 1/cell;
  species AMP_m_ in cell = 1/cell;
  species AMP_p_ in cell = 1/cell;
  species pi_p_ in cell = 1/cell;
  species Pyr_p_ in cell = 1/cell;
  species Lolet_p_ in cell = 1/cell;
  species AMP_c_ in cell = 1/cell;
  species Pyrr5Carb_p_ in cell = 1/cell;
  species c_Aco_c_ in cell = 1/cell;
  species Citrate_m_ in cell = 1/cell;
  species Pyr_m_ in cell = 1/cell;
  species NADP__m_ in cell = 1/cell;
  species DHAP_p_ in cell = 1/cell;
  species Pr_AMP_p_ in cell = 1/cell;
  species Caff_CoA_c_ in cell = 1/cell;
  species Prep_p_ in cell = 1/cell;
  species a_1_3_DPGA_p_ in cell = 1/cell;
  species Conald_c_ in cell = 1/cell;
  species Glycoald_c_ in cell = 1/cell;
  species ammonia_m_ in cell = 1/cell;
  species Cyto_Red_m_ in cell = 1/cell;
  species NADPH_m_ in cell = 1/cell;
  species DHooro_m_ in cell = 1/cell;
  species a_3DODara7P_p_ in cell = 1/cell;
  species Ser_p_ in cell = 1/cell;
  species CaffQuin_c_ in cell = 1/cell;
  species a_3hprpnte_c_ in cell = 1/cell;
  species Fruct_c_ in cell = 1/cell;
  species CO2_c_ in cell = 1/cell;
  species O_Ace_L_ser_p_ in cell = 1/cell;
  species CO2_m_ in cell = 1/cell;
  species $H__e_ in cell = 1/cell;
  species ppi_p_ in cell = 1/cell;
  species CO2_p_ in cell = 1/cell;
  species H__m_ in cell = 1/cell;
  species Pr_FormCarbP_p_ in cell = 1/cell;
  species N10FormTHF_p_ in cell = 1/cell;
  species iaP_p_ in cell = 1/cell;
  species Trp_p_ in cell = 1/cell;
  species aKG_c_ in cell = 1/cell;
  species a_2kiVal_p_ in cell = 1/cell;
  species Arg_c_ in cell = 1/cell;
  species ppi_c_ in cell = 1/cell;
  species LLdapime_p_ in cell = 1/cell;
  species DHAP_c_ in cell = 1/cell;
  species aKG_m_ in cell = 1/cell;
  species Trp_c_ in cell = 1/cell;
  species aKG_p_ in cell = 1/cell;
  species a_4CoumCoA_c_ in cell = 1/cell;
  species NADH_c_ in cell = 1/cell;
  species L_Glut_gsAld_p_ in cell = 1/cell;
  species Formate_p_ in cell = 1/cell;
  species a_2PG_p_ in cell = 1/cell;
  species a_3DHShiki_p_ in cell = 1/cell;
  species Formate_m_ in cell = 1/cell;
  species Ace_CoA_p_ in cell = 1/cell;
  species PEP_p_ in cell = 1/cell;
  species t_Cinn_c_ in cell = 1/cell;
  species Formate_c_ in cell = 1/cell;
  species a_510MeteTHF_m_ in cell = 1/cell;
  species Ace_CoA_c_ in cell = 1/cell;
  species PEP_c_ in cell = 1/cell;
  species pyrdeh3_m_ in cell = 1/cell;
  species Fumr_m_ in cell = 1/cell;
  species Ace_CoA_m_ in cell = 1/cell;
  species Glyoxylate_c_ in cell = 1/cell;
  species PRpi_p_ in cell = 1/cell;
  species Glu_m_ in cell = 1/cell;
  species O5P_p_ in cell = 1/cell;
  species pyrdeh3_p_ in cell = 1/cell;
  species Glu_c_ in cell = 1/cell;
  species Fer_CoA_c_ in cell = 1/cell;
  species UDP_Gal_c_ in cell = 1/cell;
  species H2O2_m_ in cell = 1/cell;
  species Asn_c_ in cell = 1/cell;
  species S_Ade_L_meth_c_ in cell = 1/cell;
  species Lolnt_c_ in cell = 1/cell;
  species Chorismate_p_ in cell = 1/cell;
  species $Asn_e_ in cell = 1/cell;
  species RuBP_p_ in cell = 1/cell;
  species NADP__p_ in cell = 1/cell;
  species Fruct26bP_p_ in cell = 1/cell;
  species Isocit_m_ in cell = 1/cell;
  species Asn_p_ in cell = 1/cell;
  species Shikm3P_p_ in cell = 1/cell;
  species sulfide_p_ in cell = 1/cell;
  species D_Sed_17bP_p_ in cell = 1/cell;
  species a_5EnoShiki3P_p_ in cell = 1/cell;
  species NADPH_p_ in cell = 1/cell;
  species O2_c_ in cell = 1/cell;
  species Asp4P_p_ in cell = 1/cell;
  species ATP_p_ in cell = 1/cell;
  species a_4CoumQuin_c_ in cell = 1/cell;
  species SinapAlc_c_ in cell = 1/cell;
  species N10FormTHF_c_ in cell = 1/cell;
  species SMLM_c_ in cell = 1/cell;
  species ADP_c_ in cell = 1/cell;

  // Reactions:
  Coleoptile_Biomass: 0.0914 Ala_c_ + 0.0711 Arg_c_ + 0.0985 Asp_c_ + 0.0126 Cys_c_ + 0.1758 Glu_c_ + 0.094 Gly_c_ + 0.0209 His_c_ + 0.045 Ile_c_ + 0.0901 Leu_c_ + 0.0409 Lys_c_ + 0.0251 Met_c_ + 0.041 Phe_c_ + 0.0638 Pro_c_ + 0.0699 Ser_c_ + 0.0478 Thr_c_ + 0.012 Trp_c_ + 0.0386 Tyr_c_ + 0.075 Val_c_ + 0.1506 a_Glc_c_ + 0.3445 Sucrose_c_ + 0.3272 Fruct_c_ + 1.9304 Starch_p_ + 0.7401 cellulose_c_ + 0.054 UDP_L_arab_c_ + 0.2641 UDP_Xyl_c_ + 0.0099 UDP_Gal_c_ + 0.1728 UDP_Glc_c_ + 0.2165 UDP_Glucur_c_ + 0.11494 TAG_c_ + 40.98 ATP_c_ => 40.98 ADP_c_ + 40.98 pi_c_ + 0.6953 UDP_c_ + 0.6953 H__c_; v_1();
    v_1 = 1;
  Straw_Biomass: 0.0321 Ala_c_ + 0.0123 Arg_c_ + 0.0417 Asp_c_ + 0.0033 Cys_c_ + 0.0385 Glu_c_ + 0.0282 Gly_c_ + 0.057 His_c_ + 0.014 Ile_c_ + 0.0234 Leu_c_ + 0.0153 Lys_c_ + 0.0076 Met_c_ + 0.0133 Phe_c_ + 0.0225 Pro_c_ + 0.0219 Ser_c_ + 0.0192 Thr_c_ + 0.0016 Trp_c_ + 0.0077 Tyr_c_ + 0.0225 Val_c_ + 0.0546 a_Glc_c_ + 0.1049 Sucrose_c_ + 0.0643 Fruct_c_ + 0.3249 Starch_p_ + 2.0789 cellulose_c_ + 0.1256 UDP_L_arab_c_ + 0.572 UDP_Xyl_c_ + 0.0229 UDP_Gal_c_ + 0.4018 UDP_Glc_c_ + 0.5033 UDP_Glucur_c_ + 0.2065 Coum_Alc_c_ + 0.1721 Conalc_c_ + 0.1475 SinapAlc_c_ + 0.01625 TAG_c_ + 41.75 ATP_c_ => 41.75 ADP_c_ + 41.75 pi_c_ + 1.6256 UDP_c_ + 1.6256 H__c_; v_2();
    v_2 = 1;
  Ex_CO2: $CO2_e_ -> CO2_c_; v_3();
    v_3 = 1;
  Ex_H2O: $H2O_e_ -> H2O_c_; v_4();
    v_4 = 1;
  Ex_photon: $photon_e_ => photon_p_; v_5();
    v_5 = 1;
  Ex_H_: $H__e_ -> H__c_; v_6();
    v_6 = 1;
  Ex_O2: $O2_e_ -> O2_c_; v_7();
    v_7 = 1;
  Ex_pp: $pi_e_ -> pi_c_; v_8();
    v_8 = 1;
  Ex_Sucrose: $Sucrose_e_ -> Sucrose_c_; v_9();
    v_9 = 1;
  Ex_Glucose: $a_Glc_e_ -> a_Glc_c_; v_10();
    v_10 = 1;
  Ex_Starch: $Starch_e_ -> Starch_p_; v_11();
    v_11 = 1;
  Ex_Sulfate: $sulfate_e_ -> sulfate_c_; v_12();
    v_12 = 1;
  Ex_Asparagine: $Asn_e_ -> Asn_c_; v_13();
    v_13 = 1;
  Ex_Glutamine: $Gln_e_ -> Gln_c_; v_14();
    v_14 = 1;
  Ex_ethanol: Ethanol_c_ -> $Ethanol_e_; v_15();
    v_15 = 1;
  Ex_Lactate: Lactate_c_ -> $Lactate_e_; v_16();
    v_16 = 1;
  Ex_Alanine: Ala_c_ -> $Ala_e_; v_17();
    v_17 = 1;
  Ex_Succinate: Succ_c_ -> $Succ_e_; v_18();
    v_18 = 1;
  IPP_c_: H2O_c_ + ppi_c_ => 2 pi_c_ + H__c_; v_19();
    v_19 = 1;
  IPP_m_: H2O_m_ + ppi_m_ => 2 pi_m_ + H__m_; v_20();
    v_20 = 1;
  IPP_p_: H2O_p_ + ppi_p_ => 2 pi_p_ + H__p_; v_21();
    v_21 = 1;
  ALS1_p_: 2 Pyr_p_ + H__p_ => a_2Acelac_p_ + CO2_p_; v_22();
    v_22 = 1;
  CAT_c_: 2 H2O2_c_ => 2 H2O_c_ + O2_c_; v_23();
    v_23 = 1;
  GS_p_: 2 redferr_p_ + aKG_p_ + Gln_p_ + 2 H__p_ => 2 oxiferr_p_ + 2 Glu_p_; v_24();
    v_24 = 1;
  RBCS_C_p_: RuBP_p_ + CO2_p_ + H2O_p_ => 2 a_3PG_p_ + 2 H__p_; v_25();
    v_25 = 1;
  COX_m_: 4 Cyto_Red_m_ + O2_m_ + 6 H__m_ => 4 Cyto_Oxi_m_ + 2 H2O_m_ + 6 H__c_; v_26();
    v_26 = 1;
  ATPPH_c_: ATP_c_ + H2O_c_ => ADP_c_ + pi_c_ + H__c_; v_27();
    v_27 = 1;
  ATPS_m_: ADP_m_ + pi_m_ + 3 H__c_ => ATP_m_ + H2O_m_ + 2 H__m_; v_28();
    v_28 = 1;
  GLT_p_: NADH_p_ + aKG_p_ + Gln_p_ + H__p_ => NAD__p_ + 2 Glu_p_; v_29();
    v_29 = 1;
  GRC2_p_: GludiS_p_ + NADPH_p_ + H__p_ => 2 Gluta_p_ + NADP__p_; v_30();
    v_30 = 1;
  ADNK_c_: AMP_c_ + ATP_c_ => 2 ADP_c_; v_31();
    v_31 = 1;
  ADNK_p_: AMP_p_ + ATP_p_ => 2 ADP_p_; v_32();
    v_32 = 1;
  NDKR1_c_: UDP_c_ + ATP_c_ -> UTP_c_ + ADP_c_; v_33();
    v_33 = 1;
  NDKR1_p_: UDP_p_ + ATP_p_ -> UTP_p_ + ADP_p_; v_34();
    v_34 = 1;
  ATPT_p_: ATP_p_ + UMP_p_ => ADP_p_ + UDP_p_; v_35();
    v_35 = 1;
  SAM_c_: ATP_c_ + Met_c_ + H2O_c_ => pi_c_ + ppi_c_ + S_Ade_L_meth_c_; v_36();
    v_36 = 1;
  AMPP_c_: AMP_c_ + H2O_c_ => Adenosine_c_ + pi_c_; v_37();
    v_37 = 1;
  ADK_c_: Adenosine_c_ + ATP_c_ => AMP_c_ + ADP_c_; v_38();
    v_38 = 1;
  SAHH_c_: S_Ade_L_H_c_ + H2O_c_ => HomoCys_c_ + Adenosine_c_; v_39();
    v_39 = 1;
  PPS_c_: H2O_c_ + Pyr_c_ + ATP_c_ => pi_c_ + PEP_c_ + AMP_c_; v_40();
    v_40 = 1;
  PPS_p_: H2O_p_ + Pyr_p_ + ATP_p_ => pi_p_ + PEP_p_ + AMP_p_; v_41();
    v_41 = 1;
  PYK_c_: ADP_c_ + PEP_c_ + H__c_ => ATP_c_ + Pyr_c_; v_42();
    v_42 = 1;
  PYK_p_: ADP_p_ + PEP_p_ + H__p_ => ATP_p_ + Pyr_p_; v_43();
    v_43 = 1;
  PPDK1_p_: ppi_p_ + PEP_p_ + AMP_p_ -> ATP_p_ + Pyr_p_ + pi_p_; v_44();
    v_44 = 1;
  PPDK2_c_: ppi_c_ + PEP_c_ + AMP_c_ -> ATP_c_ + Pyr_c_ + pi_c_; v_45();
    v_45 = 1;
  PFL_c_: CoA_c_ + Pyr_c_ => Formate_c_ + Ace_CoA_c_; v_46();
    v_46 = 1;
  ME6_p_: NADP__p_ + Malate_p_ => NADPH_p_ + CO2_p_ + Pyr_p_; v_47();
    v_47 = 1;
  PDC_c_: Pyr_c_ + H__c_ => Acetald_c_ + CO2_c_; v_48();
    v_48 = 1;
  ACDH_c_: NAD__c_ + CoA_c_ + Acetald_c_ -> NADH_c_ + Ace_CoA_c_ + H__c_; v_49();
    v_49 = 1;
  ACS_c_: CoA_c_ + Acetate_c_ + ATP_c_ => Ace_CoA_c_ + ppi_c_ + AMP_c_; v_50();
    v_50 = 1;
  ACS_m_: CoA_m_ + Acetate_m_ + ATP_m_ => Ace_CoA_m_ + ppi_m_ + AMP_m_; v_51();
    v_51 = 1;
  ACS_p_: CoA_p_ + Acetate_p_ + ATP_p_ => Ace_CoA_p_ + ppi_p_ + AMP_p_; v_52();
    v_52 = 1;
  P5CS1_c_: Glu_c_ + ATP_c_ => L_Glut_5P_c_ + ADP_c_; v_53();
    v_53 = 1;
  P5CS1_p_: Glu_p_ + ATP_p_ => L_Glut_5P_p_ + ADP_p_; v_54();
    v_54 = 1;
  GDH1_m_: ammonia_m_ + aKG_m_ + NADPH_m_ + H__m_ => Glu_m_ + H2O_m_ + NADP__m_; v_55();
    v_55 = 1;
  GDH2_m_: Glu_m_ + H2O_m_ + NAD__m_ => ammonia_m_ + aKG_m_ + NADH_m_ + H__m_; v_56();
    v_56 = 1;
  GLN1_c_: ammonia_c_ + Glu_c_ + ATP_c_ => Gln_c_ + ADP_c_ + pi_c_; v_57();
    v_57 = 1;
  GLN2_p_: ammonia_p_ + Glu_p_ + ATP_p_ => Gln_p_ + ADP_p_ + pi_p_; v_58();
    v_58 = 1;
  ALAAT_c_: aKG_c_ + Ala_c_ -> Glu_c_ + Pyr_c_; v_59();
    v_59 = 1;
  GAT_c_: Glu_c_ + Ace_CoA_c_ => N_Ace_L_glutt_c_ + CoA_c_; v_60();
    v_60 = 1;
  GAD_c_: Glu_c_ + H__c_ => CO2_c_ + GABA_c_; v_61();
    v_61 = 1;
  IDP_c_: Isocit_c_ + NADP__c_ => NADPH_c_ + aKG_c_ + CO2_c_; v_62();
    v_62 = 1;
  IDP_m_: Isocit_m_ + NADP__m_ => NADPH_m_ + aKG_m_ + CO2_m_; v_63();
    v_63 = 1;
  GPX_p_: H2O2_p_ + 2 Gluta_p_ => GludiS_p_ + 2 H2O_p_; v_64();
    v_64 = 1;
  UGD_c_: UDP_Glc_c_ + H2O_c_ + 2 NAD__c_ => UDP_Glucur_c_ + 2 NADH_c_ + 3 H__c_; v_65();
    v_65 = 1;
  UGP_c_: a_Glc1P_c_ + UTP_c_ -> UDP_Glc_c_ + ppi_c_; v_66();
    v_66 = 1;
  GALE_c_: UDP_Glc_c_ -> UDP_Gal_c_; v_67();
    v_67 = 1;
  NDKR2_c_: GDP_c_ + ATP_c_ -> GTP_c_ + ADP_c_; v_68();
    v_68 = 1;
  NDKR2_p_: GDP_p_ + ATP_p_ -> GTP_p_ + ADP_p_; v_69();
    v_69 = 1;
  PCKA_c_: OAA_c_ + ATP_c_ => CO2_c_ + PEP_c_ + ADP_c_; v_70();
    v_70 = 1;
  MDH_c_: Malate_c_ + NAD__c_ + H__c_ -> OAA_c_ + NADH_c_; v_71();
    v_71 = 1;
  MDH_m_: Malate_m_ + NAD__m_ + H__m_ -> OAA_m_ + NADH_m_; v_72();
    v_72 = 1;
  PPC_c_: pi_c_ + OAA_c_ -> PEP_c_ + HCO3_c_; v_73();
    v_73 = 1;
  CSY_m_: OAA_m_ + Ace_CoA_m_ + H2O_m_ => Citrate_m_ + CoA_m_ + H__m_; v_74();
    v_74 = 1;
  ASP1_c_: Asp_c_ + aKG_c_ -> Glu_c_ + OAA_c_; v_75();
    v_75 = 1;
  ASP1_m_: Asp_m_ + aKG_m_ -> Glu_m_ + OAA_m_; v_76();
    v_76 = 1;
  ASP1_p_: Asp_p_ + aKG_p_ -> Glu_p_ + OAA_p_; v_77();
    v_77 = 1;
  GGAT_c_: Glu_c_ + Glyoxylate_c_ => aKG_c_ + Gly_c_; v_78();
    v_78 = 1;
  SUCLG_m_: Succ_m_ + CoA_m_ + ATP_m_ -> Suc_CoA_m_ + ADP_m_ + pi_m_; v_79();
    v_79 = 1;
  LYSA_p_: mPime_p_ + H__p_ => CO2_p_ + Lys_p_; v_80();
    v_80 = 1;
  MLS_p_: Ace_CoA_p_ + H2O_p_ + Glyoxylate_p_ => Malate_p_ + CoA_p_ + H__c_; v_81();
    v_81 = 1;
  GOX_c_: Glycolate_c_ + O2_c_ => Glyoxylate_c_ + H2O2_c_; v_82();
    v_82 = 1;
  ICL_c_: Isocit_c_ => Glyoxylate_c_ + Succ_c_; v_83();
    v_83 = 1;
  AK_p_: Asp_p_ + ATP_p_ => Asp4P_p_ + ADP_p_; v_84();
    v_84 = 1;
  ASN1_p_: ammonia_p_ + Asp_p_ + ATP_p_ => Asn_p_ + ppi_p_ + AMP_p_; v_85();
    v_85 = 1;
  ASPG_c_: Asn_c_ + H2O_c_ => ammonia_c_ + Asp_c_ + H__c_; v_86();
    v_86 = 1;
  FDH_c_: Formate_c_ + NAD__c_ => CO2_c_ + NADH_c_; v_87();
    v_87 = 1;
  SADN_p_: sulfate_p_ + ATP_p_ + H__p_ => Ade_5P_p_ + ppi_p_; v_88();
    v_88 = 1;
  ARGD_c_: H2O_c_ + Arg_c_ => ammonia_c_ + citrulline_c_; v_89();
    v_89 = 1;
  CPA_c_: 2 ATP_c_ + Gln_c_ + HCO3_c_ + H2O_c_ => Glu_c_ + 2 ADP_c_ + pi_c_ + CarmteP_c_; v_90();
    v_90 = 1;
  ASN2_p_: Gln_p_ + Asp_p_ + ATP_p_ + H2O_p_ => Glu_p_ + Asn_p_ + ppi_p_ + AMP_p_ + H__p_; v_91();
    v_91 = 1;
  PSP_p_: a_3PhosSer_p_ + H2O_p_ => Ser_p_ + pi_p_; v_92();
    v_92 = 1;
  SAT_p_: Ser_p_ + Ace_CoA_p_ => O_Ace_L_ser_p_ + CoA_p_; v_93();
    v_93 = 1;
  SGAT_c_: Glyoxylate_c_ + Ser_c_ => Hydpyr_c_ + Gly_c_; v_94();
    v_94 = 1;
  MMT_c_: Met_c_ + S_Ade_L_meth_c_ => S_Ade_L_H_c_ + SMLM_c_; v_95();
    v_95 = 1;
  HMT1_c_: HomoCys_c_ + S_Ade_L_meth_c_ => S_Ade_L_H_c_ + Met_c_; v_96();
    v_96 = 1;
  HMT2_c_: SMLM_c_ + HomoCys_c_ => 2 Met_c_; v_97();
    v_97 = 1;
  ENO1_c_: a_2PG_c_ -> PEP_c_ + H2O_c_; v_98();
    v_98 = 1;
  ENO1_p_: a_2PG_p_ -> PEP_p_ + H2O_p_; v_99();
    v_99 = 1;
  CTL_c_: citrulline_c_ + H2O_c_ + H__c_ => Orn_c_ + CO2_c_ + ammonia_c_; v_100();
    v_100 = 1;
  OAT_c_: Orn_c_ + aKG_c_ -> Glu_c_ + L_Glut_gsAld_c_; v_101();
    v_101 = 1;
  TSB2_p_: Indole_p_ + Ser_p_ => Trp_p_ + H2O_p_; v_102();
    v_102 = 1;
  ADT_p_: Arogenate_p_ + H__p_ => Phe_p_ + H2O_p_ + CO2_p_; v_103();
    v_103 = 1;
  LDH_c_: NADH_c_ + Pyr_c_ + H__c_ => NAD__c_ + Lactate_c_; v_104();
    v_104 = 1;
  MMSDH_c_: NADP__c_ + Mal_sAld_c_ + CoA_c_ => Ace_CoA_c_ + NADPH_c_ + CO2_c_; v_105();
    v_105 = 1;
  IDH_m_: Isocit_m_ + NAD__m_ => aKG_m_ + CO2_m_ + NADH_m_; v_106();
    v_106 = 1;
  ALDH1_c_: Acetald_c_ + NAD__c_ + H2O_c_ => NADH_c_ + Acetate_c_ + 2 H__c_; v_107();
    v_107 = 1;
  ALDH1_p_: Acetald_p_ + NAD__p_ + H2O_p_ => NADH_p_ + Acetate_p_ + 2 H__c_; v_108();
    v_108 = 1;
  SSADH1_m_: H2O_m_ + NAD__m_ + SuccsAld_m_ => NADH_m_ + Succ_m_ + 2 H__c_; v_109();
    v_109 = 1;
  TYRAAT_p_: Arogenate_p_ + NADP__p_ => Tyr_p_ + NADPH_p_ + CO2_p_; v_110();
    v_110 = 1;
  THRALD_p_: Thr_p_ => Gly_p_ + Acetald_p_; v_111();
    v_111 = 1;
  ADH_c_: Acetald_c_ + NADH_c_ + H__c_ -> Ethanol_c_ + NAD__c_; v_112();
    v_112 = 1;
  FBP1_c_: Fruct16bP_c_ + H2O_c_ => Fruct6P_c_ + pi_c_; v_113();
    v_113 = 1;
  FBP1_p_: Fruct16bP_p_ + H2O_p_ => Fruct6P_p_ + pi_p_; v_114();
    v_114 = 1;
  FBP2_c_: Fruct26bP_c_ + H2O_c_ => Fruct6P_c_ + pi_c_; v_115();
    v_115 = 1;
  FBP2_p_: Fruct26bP_p_ + H2O_p_ => Fruct6P_p_ + pi_p_; v_116();
    v_116 = 1;
  SPS_c_: UDP_Glc_c_ + Fruct6P_c_ => Sucr6P_c_ + UDP_c_; v_117();
    v_117 = 1;
  PGI_c_: b_Glc6P_c_ -> Fruct6P_c_; v_118();
    v_118 = 1;
  PGI_p_: b_Glc6P_p_ -> Fruct6P_p_; v_119();
    v_119 = 1;
  CIN_c_: Sucrose_c_ + H2O_c_ => Fruct_c_ + a_Glc_c_; v_120();
    v_120 = 1;
  SPP_c_: Sucr6P_c_ + H2O_c_ => Sucrose_c_ + pi_c_; v_121();
    v_121 = 1;
  SUS_c_: UDP_Glc_c_ + Fruct_c_ -> Sucrose_c_ + UDP_c_; v_122();
    v_122 = 1;
  INO1_c_: b_Glc6P_c_ => D_myo3mP_c_; v_123();
    v_123 = 1;
  SIR_p_: sulfite_p_ + 3 redferr_p_ + 8 H__p_ => sulfide_p_ + 3 oxiferr_p_ + 3 H2O_p_; v_124();
    v_124 = 1;
  FK_c_: Fruct_c_ + ATP_c_ => Fruct6P_c_ + ADP_c_ + H__c_; v_125();
    v_125 = 1;
  RCS_p_: O_Ace_L_ser_p_ + sulfide_p_ => Cys_p_ + Acetate_p_ + H__p_; v_126();
    v_126 = 1;
  FTHFL_c_: ATP_c_ + Formate_c_ + THF_c_ => ADP_c_ + pi_c_ + N10FormTHF_c_; v_127();
    v_127 = 1;
  FTHFL_m_: ATP_m_ + Formate_m_ + THF_m_ => ADP_m_ + pi_m_ + N10FormTHF_m_; v_128();
    v_128 = 1;
  FTHFL_p_: ATP_p_ + Formate_p_ + THF_p_ => ADP_p_ + pi_p_ + N10FormTHF_p_; v_129();
    v_129 = 1;
  PURU_c_: H2O_c_ + N10FormTHF_c_ => THF_c_ + Formate_c_ + H__c_; v_130();
    v_130 = 1;
  PURU_m_: H2O_m_ + N10FormTHF_m_ => THF_m_ + Formate_m_ + H__m_; v_131();
    v_131 = 1;
  PURU_p_: H2O_p_ + N10FormTHF_p_ => THF_p_ + Formate_p_ + H__p_; v_132();
    v_132 = 1;
  SHM1_c_: a_510MeteTHF_c_ + Gly_c_ + H2O_c_ -> Ser_c_ + THF_c_; v_133();
    v_133 = 1;
  SHM1_m_: a_510MeteTHF_m_ + Gly_m_ + H2O_m_ -> Ser_m_ + THF_m_; v_134();
    v_134 = 1;
  SHM1_p_: a_510MeteTHF_p_ + Gly_p_ + H2O_p_ -> Ser_p_ + THF_p_; v_135();
    v_135 = 1;
  APS_p_: a_Glc1P_p_ + ATP_p_ + H__p_ => ADP_D_Glu_p_ + ppi_p_; v_136();
    v_136 = 1;
  UMPS_p_: O5P_p_ + H__p_ => CO2_p_ + UMP_p_; v_137();
    v_137 = 1;
  ASA_p_: Chorismate_p_ + Gln_p_ => Glu_p_ + Anth_p_ + Pyr_p_ + H__p_; v_138();
    v_138 = 1;
  TD_p_: Thr_p_ => a_2oxoBut_p_ + ammonia_p_ + H__p_; v_139();
    v_139 = 1;
  TPI_c_: G3P_c_ -> DHAP_c_; v_140();
    v_140 = 1;
  TPI_p_: G3P_p_ -> DHAP_p_; v_141();
    v_141 = 1;
  PRS_p_: ATP_p_ + R5P_p_ => PRpi_p_ + AMP_p_ + H__p_; v_142();
    v_142 = 1;
  RPI_c_: R5P_c_ -> Ru5P_c_; v_143();
    v_143 = 1;
  RPI_p_: R5P_p_ -> Ru5P_p_; v_144();
    v_144 = 1;
  GAPN_c_: G3P_c_ + NADP__c_ + H2O_c_ => a_3PG_c_ + NADPH_c_ + 2 H__c_; v_145();
    v_145 = 1;
  GAPDH_c_: G3P_c_ + pi_c_ + NAD__c_ -> a_1_3_DPGA_c_ + NADH_c_ + H__c_; v_146();
    v_146 = 1;
  GAPDH_p_: G3P_p_ + pi_p_ + NAD__p_ -> a_1_3_DPGA_p_ + NADH_p_ + H__p_; v_147();
    v_147 = 1;
  ALD_c_: Fruct16bP_c_ -> DHAP_c_ + G3P_c_; v_148();
    v_148 = 1;
  ALD_p_: Fruct16bP_p_ -> DHAP_p_ + G3P_p_; v_149();
    v_149 = 1;
  ATPPRT_p_: ATP_p_ + PRpi_p_ => Pr_ATP_p_ + ppi_p_; v_150();
    v_150 = 1;
  AMPRT_p_: Anth_p_ + PRpi_p_ => N5PAnth_p_ + ppi_p_; v_151();
    v_151 = 1;
  FUM_m_: Malate_m_ -> Fumr_m_ + H2O_m_; v_152();
    v_152 = 1;
  ADNSL_p_: Ade_Succ_p_ => Fumr_p_ + AMP_p_; v_153();
    v_153 = 1;
  ARGSL_c_: ArgSucc_c_ => Arg_c_ + Fumr_c_; v_154();
    v_154 = 1;
  BCAT1_p_: Leu_p_ + aKG_p_ -> Glu_p_ + a_2kiCapr_p_; v_155();
    v_155 = 1;
  MTHFD1_c_: a_510MeteTHF_c_ + NAD__c_ => a_510MetTHF_c_ + NADH_c_; v_156();
    v_156 = 1;
  MTHFD1_m_: a_510MeteTHF_m_ + NAD__m_ => a_510MetTHF_m_ + NADH_m_; v_157();
    v_157 = 1;
  MTHFD1_p_: a_510MeteTHF_p_ + NAD__p_ => a_510MetTHF_p_ + NADH_p_; v_158();
    v_158 = 1;
  MTHFD2_c_: a_510MeteTHF_c_ + NADP__c_ => NADPH_c_ + a_510MetTHF_c_; v_159();
    v_159 = 1;
  MTHFD2_m_: a_510MeteTHF_m_ + NADP__m_ => NADPH_m_ + a_510MetTHF_m_; v_160();
    v_160 = 1;
  MTHFD2_p_: a_510MeteTHF_p_ + NADP__p_ => NADPH_p_ + a_510MetTHF_p_; v_161();
    v_161 = 1;
  IMPC_p_: Pr_FormCarb_p_ => IMP_p_ + H2O_p_; v_162();
    v_162 = 1;
  PURA1_p_: Asp_p_ + IMP_p_ + GTP_p_ => Ade_Succ_p_ + pi_p_ + GDP_p_ + 2 H__p_; v_163();
    v_163 = 1;
  AMETHM_c_: S_Ade_L_meth_c_ -> S_Ade_L_H_c_; v_164();
    v_164 = 1;
  HDH1_p_: His_al_p_ + NAD__p_ + H2O_p_ => His_p_ + NADH_p_ + 2 H__p_; v_165();
    v_165 = 1;
  MIOX_c_: O2_c_ + m_Ino_c_ => Glucuronate_c_ + H2O_c_ + H__c_; v_166();
    v_166 = 1;
  MIOMP_c_: D_myo3mP_c_ + H2O_c_ => m_Ino_c_ + pi_c_; v_167();
    v_167 = 1;
  FNR_p_: 2 redferr_p_ + NADP__p_ + H__p_ -> 2 oxiferr_p_ + NADPH_p_; v_168();
    v_168 = 1;
  AKGDH_m_: aKG_m_ + CoA_m_ + NAD__m_ => Suc_CoA_m_ + CO2_m_ + NADH_m_; v_169();
    v_169 = 1;
  DADH_p_: a_23dhiVal_p_ => a_2kiVal_p_ + H2O_p_; v_170();
    v_170 = 1;
  IPMS_p_: a_2kiVal_p_ + Ace_CoA_p_ + H2O_p_ => a_2iPropMal_p_ + CoA_p_ + H__p_; v_171();
    v_171 = 1;
  BCAT2_p_: Val_p_ + aKG_p_ -> Glu_p_ + a_2kiVal_p_; v_172();
    v_172 = 1;
  GDC_m_: Gly_m_ + THF_m_ + NAD__m_ => ammonia_m_ + a_510MeteTHF_m_ + CO2_m_ + NADH_m_ + H__m_; v_173();
    v_173 = 1;
  PROC1_c_: Pyrr5Carb_c_ + NADH_c_ + 2 H__c_ => Pro_c_ + NAD__c_; v_174();
    v_174 = 1;
  PROC1_p_: Pyrr5Carb_p_ + NADH_p_ + 2 H__p_ => Pro_p_ + NAD__p_; v_175();
    v_175 = 1;
  PROC2_c_: Pyrr5Carb_c_ + NADPH_c_ + 2 H__c_ => Pro_c_ + NADP__c_; v_176();
    v_176 = 1;
  PROC2_p_: Pyrr5Carb_p_ + NADPH_p_ + 2 H__p_ => Pro_p_ + NADP__p_; v_177();
    v_177 = 1;
  CBL_p_: cysttn_p_ + H2O_p_ => ammonia_p_ + Pyr_p_ + HomoCys_p_ + H__p_; v_178();
    v_178 = 1;
  ACO2_c_: c_Aco_c_ + H2O_c_ -> Isocit_c_; v_179();
    v_179 = 1;
  ACO2_m_: c_Aco_m_ + H2O_m_ -> Isocit_m_; v_180();
    v_180 = 1;
  GADH_c_: H2O_c_ + NAD__c_ + Glycoald_c_ => NADH_c_ + Glycolate_c_ + 2 H__c_; v_181();
    v_181 = 1;
  PGP_p_: H2O_p_ + a_2PhosGlyco_p_ => Glycolate_p_ + pi_p_; v_182();
    v_182 = 1;
  GPUT_c_: a_D_Glucur_1_P_c_ + UTP_c_ + H__c_ => UDP_Glucur_c_ + ppi_c_; v_183();
    v_183 = 1;
  UDPGDC_c_: UDP_Glucur_c_ + H__c_ => UDP_Xyl_c_ + CO2_c_; v_184();
    v_184 = 1;
  HPR_c_: Hydpyr_c_ + NADH_c_ + H__c_ => Glycerate_c_ + NAD__c_; v_185();
    v_185 = 1;
  ATC_p_: Asp_p_ + CarmteP_p_ => N_CarbL_Asp_p_ + pi_p_ + H__p_; v_186();
    v_186 = 1;
  OTC_c_: Orn_c_ + CarmteP_c_ -> citrulline_c_ + pi_c_ + H__c_; v_187();
    v_187 = 1;
  TS_p_: O_P_L_hmser_p_ + H2O_p_ => pi_p_ + Thr_p_; v_188();
    v_188 = 1;
  UEL_c_: UDP_Xyl_c_ => UDP_L_arab_c_; v_189();
    v_189 = 1;
  GLCAK_c_: Glucuronate_c_ + ATP_c_ => a_D_Glucur_1_P_c_ + ADP_c_ + H__c_; v_190();
    v_190 = 1;
  PGK_c_: a_3PG_c_ + ATP_c_ -> a_1_3_DPGA_c_ + ADP_c_; v_191();
    v_191 = 1;
  PGK_p_: a_3PG_p_ + ATP_p_ -> a_1_3_DPGA_p_ + ADP_p_; v_192();
    v_192 = 1;
  PGDH_p_: a_3PG_p_ + NAD__p_ => a_3Phoshpyr_p_ + NADH_p_ + H__p_; v_193();
    v_193 = 1;
  GLYK_p_: Glycerate_p_ + ATP_p_ => a_3PG_p_ + ADP_p_ + H__p_; v_194();
    v_194 = 1;
  PGLYCM_c_: a_3PG_c_ -> a_2PG_c_; v_195();
    v_195 = 1;
  PGLYCM_p_: a_3PG_p_ -> a_2PG_p_; v_196();
    v_196 = 1;
  PRK_p_: Ru5P_p_ + ATP_p_ => RuBP_p_ + ADP_p_ + H__p_; v_197();
    v_197 = 1;
  G6PGH1_c_: a_6_P_gluco_c_ + NADP__c_ => Ru5P_c_ + CO2_c_ + NADPH_c_; v_198();
    v_198 = 1;
  G6PGH2_p_: a_6_P_gluco_p_ + NADP__p_ => Ru5P_p_ + CO2_p_ + NADPH_p_; v_199();
    v_199 = 1;
  RPE_c_: Ru5P_c_ -> Xu5P_c_; v_200();
    v_200 = 1;
  RPE_p_: Ru5P_p_ -> Xu5P_p_; v_201();
    v_201 = 1;
  HPDH_c_: NAD__c_ + a_3hprpnte_c_ => NADH_c_ + Mal_sAld_c_ + H__c_; v_202();
    v_202 = 1;
  TKT1_c_: R5P_c_ + Xu5P_c_ -> D_Sed_7P_c_ + G3P_c_; v_203();
    v_203 = 1;
  TKT1_p_: R5P_p_ + Xu5P_p_ -> D_Sed_7P_p_ + G3P_p_; v_204();
    v_204 = 1;
  GABA_TK_m_: GABA_m_ + aKG_m_ => Glu_m_ + SuccsAld_m_; v_205();
    v_205 = 1;
  GABA_TP_m_: GABA_m_ + Pyr_m_ => Ala_m_ + SuccsAld_m_; v_206();
    v_206 = 1;
  LB1_p_: a_2iProp3Succ_p_ => a_2kiCapr_p_ + CO2_p_; v_207();
    v_207 = 1;
  MTHFC_m_: H2O_m_ + a_510MetTHF_m_ -> N10FormTHF_m_ + H__m_; v_208();
    v_208 = 1;
  PDHE1_m_: Pyr_m_ + pyrdeh1_m_ + H__m_ => pyrdeh2_m_ + CO2_m_; v_209();
    v_209 = 1;
  PDHE1_p_: Pyr_p_ + pyrdeh1_p_ + H__p_ => pyrdeh2_p_ + CO2_p_; v_210();
    v_210 = 1;
  EMB_p_: a_5EnoShiki3P_p_ => pi_p_ + Chorismate_p_; v_211();
    v_211 = 1;
  CM_p_: Chorismate_p_ => Prep_p_; v_212();
    v_212 = 1;
  HSK_p_: HomoSer_p_ + ATP_p_ => O_P_L_hmser_p_ + ADP_p_ + H__p_; v_213();
    v_213 = 1;
  HSDH1_p_: L_Asp_sAld_p_ + NADH_p_ + H__p_ => HomoSer_p_ + NAD__p_; v_214();
    v_214 = 1;
  HSDH2_p_: L_Asp_sAld_p_ + NADPH_p_ + H__p_ => HomoSer_p_ + NADP__p_; v_215();
    v_215 = 1;
  HXK_c_: a_Glc_c_ + ATP_c_ => a_Glc6P_c_ + ADP_c_ + H__c_; v_216();
    v_216 = 1;
  HXK_p_: a_Glc_p_ + ATP_p_ => a_Glc6P_p_ + ADP_p_ + H__p_; v_217();
    v_217 = 1;
  PHS_p_: glucan_p_ + pi_p_ => a_Glc1P_p_; v_218();
    v_218 = 1;
  DAHPS_p_: PEP_p_ + D_ery4P_p_ + H2O_p_ => a_3DODara7P_p_ + pi_p_; v_219();
    v_219 = 1;
  TALA_c_: G3P_c_ + D_Sed_7P_c_ => Fruct6P_c_ + D_ery4P_c_; v_220();
    v_220 = 1;
  TALA_p_: G3P_p_ + D_Sed_7P_p_ => Fruct6P_p_ + D_ery4P_p_; v_221();
    v_221 = 1;
  SBPGL_p_: DHAP_p_ + D_ery4P_p_ => D_Sed_17bP_p_; v_222();
    v_222 = 1;
  TKT2_c_: D_ery4P_c_ + Xu5P_c_ -> Fruct6P_c_ + G3P_c_; v_223();
    v_223 = 1;
  TKT2_p_: D_ery4P_p_ + Xu5P_p_ -> Fruct6P_p_ + G3P_p_; v_224();
    v_224 = 1;
  SBP_p_: H2O_p_ + D_Sed_17bP_p_ => pi_p_ + D_Sed_7P_p_; v_225();
    v_225 = 1;
  OMPD_p_: PRpi_p_ + Orot_p_ => O5P_p_ + ppi_p_; v_226();
    v_226 = 1;
  ACO1_c_: Citrate_c_ -> c_Aco_c_ + H2O_c_; v_227();
    v_227 = 1;
  ACO1_m_: Citrate_m_ -> c_Aco_m_ + H2O_m_; v_228();
    v_228 = 1;
  ASS_c_: Asp_c_ + citrulline_c_ + ATP_c_ => ArgSucc_c_ + ppi_c_ + AMP_c_ + H__c_; v_229();
    v_229 = 1;
  DHO_p_: N_CarbL_Asp_p_ + H__p_ => DHooro_p_ + H2O_p_; v_230();
    v_230 = 1;
  a_6PGL_c_: D_Glu_d_Lac6P_c_ + H2O_c_ => a_6_P_gluco_c_ + H__c_; v_231();
    v_231 = 1;
  a_6PGL_p_: D_Glu_d_Lac6P_p_ + H2O_p_ => a_6_P_gluco_p_ + H__p_; v_232();
    v_232 = 1;
  PFP_c_: Fruct6P_c_ + ppi_c_ -> pi_c_ + Fruct16bP_c_ + H__c_; v_233();
    v_233 = 1;
  SBE_p_: glucan_p_ => Starch_p_ + H2O_p_; v_234();
    v_234 = 1;
  CCOR_m_: 2 Cyto_Oxi_m_ + QH2_m_ + 1.5 H__m_ => 2 Cyto_Red_m_ + Q_m_ + 1.5 H__c_; v_235();
    v_235 = 1;
  NAD9_m_: Q_m_ + NADH_m_ + H__m_ => QH2_m_ + NAD__m_; v_236();
    v_236 = 1;
  SDH_m_: Q_m_ + Succ_m_ => QH2_m_ + Fumr_m_; v_237();
    v_237 = 1;
  BCAT3_p_: Ile_p_ + aKG_p_ -> Glu_p_ + a_2k3MetVal_p_; v_238();
    v_238 = 1;
  AGS_c_: Glu_c_ + NAce_L_Orn_c_ => N_Ace_L_glutt_c_ + Orn_c_; v_239();
    v_239 = 1;
  AOAT_c_: Glu_c_ + N_A_L_gluttsemald_c_ => NAce_L_Orn_c_ + aKG_c_; v_240();
    v_240 = 1;
  ASAD_p_: NADPH_p_ + Asp4P_p_ + H__p_ => NADP__p_ + pi_p_ + L_Asp_sAld_p_; v_241();
    v_241 = 1;
  DHDPS_p_: Pyr_p_ + L_Asp_sAld_p_ => 2 H2O_p_ + L_23_DHDC_p_ + H__p_; v_242();
    v_242 = 1;
  TSA_p_: ind3Ace_GP_p_ => Indole_p_ + G3P_p_; v_243();
    v_243 = 1;
  SK_p_: Shikimate_p_ + ATP_p_ => Shikm3P_p_ + ADP_p_ + H__p_; v_244();
    v_244 = 1;
  SKDH_p_: NADPH_p_ + a_3DHShiki_p_ + H__p_ => NADP__p_ + Shikimate_p_; v_245();
    v_245 = 1;
  SS_p_: ADP_D_Glu_p_ => ADP_p_ + glucan_p_ + H__p_; v_246();
    v_246 = 1;
  PDHE2_m_: CoA_m_ + pyrdeh2_m_ => Ace_CoA_m_ + pyrdeh3_m_; v_247();
    v_247 = 1;
  PDHE2_p_: CoA_p_ + pyrdeh2_p_ => Ace_CoA_p_ + pyrdeh3_p_; v_248();
    v_248 = 1;
  NAGK_c_: N_Ace_L_glutt_c_ + ATP_c_ => NAceGlutP_c_ + ADP_c_; v_249();
    v_249 = 1;
  MFP_c_: AcrCoA_c_ + H2O_c_ => a_3HOPropCoA_c_; v_250();
    v_250 = 1;
  DAPF_p_: LLdapime_p_ => mPime_p_; v_251();
    v_251 = 1;
  G6PDH1_c_: b_Glc6P_c_ + NADP__c_ => D_Glu_d_Lac6P_c_ + NADPH_c_ + H__c_; v_252();
    v_252 = 1;
  G6PDH1_p_: b_Glc6P_p_ + NADP__p_ => D_Glu_d_Lac6P_p_ + NADPH_p_ + H__p_; v_253();
    v_253 = 1;
  EPI_c_: a_Glc6P_c_ -> b_Glc6P_c_; v_254();
    v_254 = 1;
  EPI_p_: a_Glc6P_p_ -> b_Glc6P_p_; v_255();
    v_255 = 1;
  CESA1_c_: UDP_Glc_c_ => cellulose_c_ + UDP_c_ + H__c_; v_256();
    v_256 = 1;
  HDH2_p_: His_ol_p_ + NAD__p_ => His_al_p_ + NADH_p_ + H__p_; v_257();
    v_257 = 1;
  IMPL2_p_: L_HisP_p_ + H2O_p_ => His_ol_p_ + pi_p_; v_258();
    v_258 = 1;
  KARI_p_: a_2Acelac_p_ + NADPH_p_ + H__p_ => a_23dhiVal_p_ + NADP__p_; v_259();
    v_259 = 1;
  DHPS_m_: p_Abenz_m_ + a_2a4h6hm78dP_m_ => a_78dhPte_m_ + ppi_m_; v_260();
    v_260 = 1;
  DHQS_p_: a_3DODara7P_p_ => a_3DHQuin_p_ + pi_p_; v_261();
    v_261 = 1;
  DHQDH_p_: a_3DHQuin_p_ => H2O_p_ + a_3DHShiki_p_; v_262();
    v_262 = 1;
  RBCS_O_p_: RuBP_p_ + O2_p_ => a_2PhosGlyco_p_ + a_3PG_p_ + 2 H__p_; v_263();
    v_263 = 1;
  CHY_c_: a_3HOPropCoA_c_ + pi_c_ + ADP_c_ => a_3hprpnte_c_ + CoA_c_ + ATP_c_; v_264();
    v_264 = 1;
  HPA_p_: iaP_p_ + Glu_p_ => L_HisP_p_ + aKG_p_; v_265();
    v_265 = 1;
  P5CS2_c_: L_Glut_5P_c_ + NADPH_c_ + H__c_ => L_Glut_gsAld_c_ + pi_c_ + NADP__c_; v_266();
    v_266 = 1;
  P5CS2_p_: L_Glut_5P_p_ + NADPH_p_ + H__p_ => L_Glut_gsAld_p_ + pi_p_ + NADP__p_; v_267();
    v_267 = 1;
  PR2_c_: L_Glut_gsAld_c_ -> H2O_c_ + Pyrr5Carb_c_; v_268();
    v_268 = 1;
  PR1_p_: L_Glut_gsAld_p_ -> H2O_p_ + Pyrr5Carb_p_; v_269();
    v_269 = 1;
  AGPR_c_: NAceGlutP_c_ + NADPH_c_ + H__c_ => N_A_L_gluttsemald_c_ + NADP__c_ + pi_c_; v_270();
    v_270 = 1;
  IGPD_p_: D_eryigP_p_ => iaP_p_ + H2O_p_; v_271();
    v_271 = 1;
  EPSPS_p_: Shikm3P_p_ + PEP_p_ => a_5EnoShiki3P_p_ + pi_p_; v_272();
    v_272 = 1;
  IGPS_p_: a_1_ocdoP_p_ + H__p_ => ind3Ace_GP_p_ + CO2_p_ + H2O_p_; v_273();
    v_273 = 1;
  PAI_p_: N5PAnth_p_ => a_1_ocdoP_p_; v_274();
    v_274 = 1;
  IIL_p_: a_2iPropMal_p_ + H2O_p_ -> a_3iPropMal_p_; v_275();
    v_275 = 1;
  PRAPH_p_: Pr_ATP_p_ + H2O_p_ => Pr_AMP_p_ + ppi_p_ + H__p_; v_276();
    v_276 = 1;
  PRACH_p_: Pr_AMP_p_ + H2O_p_ => Pr_FormCarbP_p_; v_277();
    v_277 = 1;
  PSAT_p_: Glu_p_ + a_3Phoshpyr_p_ => a_3PhosSer_p_ + aKG_p_; v_278();
    v_278 = 1;
  DHPR1_p_: L_23_DHDC_p_ + NADH_p_ + H__p_ => Thdpico_p_ + NAD__p_; v_279();
    v_279 = 1;
  DHPR2_p_: L_23_DHDC_p_ + NADPH_p_ + H__p_ => Thdpico_p_ + NADP__p_; v_280();
    v_280 = 1;
  IMDH_p_: a_3iPropMal_p_ + NAD__p_ => a_2iProp3Succ_p_ + NADH_p_ + H__p_; v_281();
    v_281 = 1;
  PCOR_c_: PropCoA_c_ + NAD__c_ => AcrCoA_c_ + NADH_c_; v_282();
    v_282 = 1;
  IGPS2_p_: Pr_BulSylFormP_p_ + Gln_p_ => Glu_p_ + D_eryigP_p_ + AICAR_p_ + H__p_; v_283();
    v_283 = 1;
  PRACFT_p_: N10FormTHF_p_ + AICAR_p_ => THF_p_ + Pr_FormCarb_p_; v_284();
    v_284 = 1;
  HIS1_p_: Pr_FormCarbP_p_ => Pr_BulSylFormP_p_; v_285();
    v_285 = 1;
  PFK1_c_: ATP_c_ + Fruct6P_c_ => ADP_c_ + Fruct16bP_c_ + H__c_; v_286();
    v_286 = 1;
  PFK2_c_: ATP_c_ + Fruct6P_c_ => ADP_c_ + Fruct26bP_c_ + H__c_; v_287();
    v_287 = 1;
  PFK1_p_: ATP_p_ + Fruct6P_p_ => ADP_p_ + Fruct16bP_p_ + H__p_; v_288();
    v_288 = 1;
  PFK2_p_: ATP_p_ + Fruct6P_p_ => ADP_p_ + Fruct26bP_p_ + H__p_; v_289();
    v_289 = 1;
  KARI2_p_: a_2a2hButyr_p_ + NADPH_p_ + H__p_ => a_23dh3MetVal_p_ + NADP__p_; v_290();
    v_290 = 1;
  ILVD_p_: a_23dh3MetVal_p_ => a_2k3MetVal_p_ + H2O_p_; v_291();
    v_291 = 1;
  DPE_p_: glucan_p_ + H2O_p_ => a_Glc_p_; v_292();
    v_292 = 1;
  APR1_p_: Ade_5P_p_ + 2 Gluta_p_ => sulfite_p_ + AMP_p_ + GludiS_p_ + 2 H__p_; v_293();
    v_293 = 1;
  FRDR_p_: 2 redferr_p_ + NAD__p_ + H__p_ -> 2 oxiferr_p_ + NADH_p_; v_294();
    v_294 = 1;
  AMY_p_: Starch_p_ + H2O_p_ => glucan_p_; v_295();
    v_295 = 1;
  MTHFR2_c_: a_510MeteTHF_c_ + NADH_c_ + H__c_ -> a_5MetTHF_c_ + NAD__c_; v_296();
    v_296 = 1;
  MTHFR2_p_: a_510MeteTHF_p_ + NADPH_p_ + H__p_ -> a_5MetTHF_p_ + NADP__p_; v_297();
    v_297 = 1;
  PAT_p_: Prep_p_ + Glu_p_ => Arogenate_p_ + aKG_p_; v_298();
    v_298 = 1;
  AGD2_p_: Thdpico_p_ + Glu_p_ + H2O_p_ + H__p_ => LLdapime_p_ + aKG_p_; v_299();
    v_299 = 1;
  CPS_p_: 2 ATP_p_ + Gln_p_ + CO2_p_ + 2 H2O_p_ => Glu_p_ + 2 ADP_p_ + pi_p_ + CarmteP_p_ + 2 H__p_; v_300();
    v_300 = 1;
  PDHE3_m_: pyrdeh3_m_ + NAD__m_ => pyrdeh1_m_ + NADH_m_ + H__m_; v_301();
    v_301 = 1;
  PDHE3_p_: pyrdeh3_p_ + NAD__p_ => pyrdeh1_p_ + NADH_p_ + H__p_; v_302();
    v_302 = 1;
  PGM_c_: a_Glc1P_c_ -> a_Glc6P_c_; v_303();
    v_303 = 1;
  PGM_p_: a_Glc1P_p_ -> a_Glc6P_p_; v_304();
    v_304 = 1;
  ALS2_p_: Pyr_p_ + a_2oxoBut_p_ + H__p_ => a_2a2hButyr_p_ + CO2_p_; v_305();
    v_305 = 1;
  ILEDG_c_: CoA_c_ + aKG_c_ + Ile_c_ => PropCoA_c_ + Ace_CoA_c_ + Glu_c_; v_306();
    v_306 = 1;
  PSLR_p_: 8 photon_p_ + 2 H2O_p_ + 3 ADP_p_ + 3 pi_p_ + 2 NADP__p_ => O2_p_ + 3 ATP_p_ + 2 H__p_ + 2 NADPH_p_; v_307();
    v_307 = 1;
  CS_p_: Cys_p_ + O_P_L_hmser_p_ => cysttn_p_ + pi_p_ + H__p_; v_308();
    v_308 = 1;
  DHOX_m_: O2_m_ + DHooro_m_ => H2O2_m_ + Orot_m_; v_309();
    v_309 = 1;
  DHOD_c_: NAD__c_ + DHooro_c_ => NADH_c_ + Orot_c_ + H__c_; v_310();
    v_310 = 1;
  CA_p_: CO2_p_ + H2O_p_ => HCO3_p_; v_311();
    v_311 = 1;
  CA_c_: CO2_c_ + H2O_c_ => HCO3_c_; v_312();
    v_312 = 1;
  ACC_p_: ATP_p_ + Ace_CoA_p_ + HCO3_p_ => ADP_p_ + pi_p_ + Mal_CoA_p_ + H__p_; v_313();
    v_313 = 1;
  GPD1_c_: DHAP_c_ + NADH_c_ + H__c_ -> SGly3P_c_ + NAD__c_; v_314();
    v_314 = 1;
  GPD2_c_: DHAP_c_ + NADPH_c_ + H__c_ -> SGly3P_c_ + NADP__c_; v_315();
    v_315 = 1;
  FAS160_p_: 21 H__p_ + 7 Mal_CoA_p_ + 14 NADPH_p_ + Ace_CoA_p_ => 7 CO2_p_ + 7 CoA_p_ + 7 H2O_p_ + 14 NADP__p_ + Palmt_p_; v_316();
    v_316 = 1;
  FAS180_p_: 24 H__p_ + 8 Mal_CoA_p_ + 16 NADPH_p_ + Ace_CoA_p_ => 8 CO2_p_ + 8 CoA_p_ + 8 H2O_p_ + 16 NADP__p_ + Steat_p_; v_317();
    v_317 = 1;
  FASL181_p_: 25 H__p_ + 8 Mal_CoA_p_ + 17 NADPH_p_ + Ace_CoA_p_ => 8 CO2_p_ + 8 CoA_p_ + 8 H2O_p_ + 17 NADP__p_ + Olet_p_; v_318();
    v_318 = 1;
  FASL182_p_: 26 H__p_ + 8 Mal_CoA_p_ + 18 NADPH_p_ + Ace_CoA_p_ => 8 CO2_p_ + 8 CoA_p_ + 8 H2O_p_ + 18 NADP__p_ + Lolet_p_; v_319();
    v_319 = 1;
  FAS183_p_: 27 H__p_ + 8 Mal_CoA_p_ + 19 NADPH_p_ + Ace_CoA_p_ => 8 CO2_p_ + 8 CoA_p_ + 8 H2O_p_ + 19 NADP__p_ + Lolnt_p_; v_320();
    v_320 = 1;
  FACOAL160_c_: Palmt_c_ + ATP_c_ + CoA_c_ -> Palm_CoA_c_ + AMP_c_ + ppi_c_; v_321();
    v_321 = 1;
  FACOAL180_c_: Steat_c_ + ATP_c_ + CoA_c_ -> Stea_CoA_c_ + AMP_c_ + ppi_c_; v_322();
    v_322 = 1;
  FACOAL181_c_: Olet_c_ + ATP_c_ + CoA_c_ -> Ole_CoA_c_ + AMP_c_ + ppi_c_; v_323();
    v_323 = 1;
  FACOAL182_c_: Lolet_c_ + ATP_c_ + CoA_c_ -> Lole_CoA_c_ + AMP_c_ + ppi_c_; v_324();
    v_324 = 1;
  FACOAL183_c_: Lolnt_c_ + ATP_c_ + CoA_c_ -> Loln_CoA_c_ + AMP_c_ + ppi_c_; v_325();
    v_325 = 1;
  TAGS_c_: SGly3P_c_ + 0.668 Palm_CoA_c_ + 0.045 Stea_CoA_c_ + 0.976 Ole_CoA_c_ + 1.261 Lole_CoA_c_ + 0.048 Loln_CoA_c_ + H2O_c_ => TAG_c_ + 3 CoA_c_ + pi_c_; v_326();
    v_326 = 1;
  PAL_c_: Phe_c_ => ammonia_c_ + t_Cinn_c_ + H__c_; v_327();
    v_327 = 1;
  TAL_c_: Tyr_c_ => ammonia_c_ + a_4Coum_c_ + H__c_; v_328();
    v_328 = 1;
  CCR1_c_: a_4CoumCoA_c_ + NADPH_c_ + H__c_ => CoumAld_c_ + NADP__c_ + CoA_c_; v_329();
    v_329 = 1;
  a_4CL_c_: CoA_c_ + a_4Coum_c_ + ATP_c_ => a_4CoumCoA_c_ + ppi_c_ + AMP_c_; v_330();
    v_330 = 1;
  CAMT_c_: Caff_CoA_c_ + S_Ade_L_meth_c_ => S_Ade_L_H_c_ + Fer_CoA_c_; v_331();
    v_331 = 1;
  CCQT_c_: CaffQuin_c_ + CoA_c_ => Caff_CoA_c_ + Quinate_c_; v_332();
    v_332 = 1;
  FCR_c_: Fer_CoA_c_ + NADPH_c_ + H__c_ => Conald_c_ + NADP__c_ + CoA_c_; v_333();
    v_333 = 1;
  C4H_c_: t_Cinn_c_ + O2_c_ + NADPH_c_ + H__c_ => H2O_c_ + NADP__c_ + a_4Coum_c_; v_334();
    v_334 = 1;
  HCT_c_: a_4CoumCoA_c_ + Shikimate_c_ => a_4CoumShiki_c_ + CoA_c_; v_335();
    v_335 = 1;
  CAD1_c_: Conald_c_ + NADPH_c_ + H__c_ => Conalc_c_ + NADP__c_; v_336();
    v_336 = 1;
  CAD2_c_: SinaAld_c_ + NADPH_c_ + H__c_ => SinapAlc_c_ + NADP__c_; v_337();
    v_337 = 1;
  CQMOX_c_: a_4CoumQuin_c_ + NADPH_c_ + O2_c_ + H__c_ => CaffQuin_c_ + NADP__c_ + H2O_c_; v_338();
    v_338 = 1;
  FH_c_: Conald_c_ + NADPH_c_ + O2_c_ + H__c_ => a_5hConif_c_ + NADP__c_ + H2O_c_; v_339();
    v_339 = 1;
  AMETH_c_: a_5hConif_c_ + S_Ade_L_meth_c_ => S_Ade_L_H_c_ + SinaAld_c_ + H__c_; v_340();
    v_340 = 1;
  CSMOX_c_: a_4CoumShiki_c_ + NADPH_c_ + O2_c_ + H__c_ => CaffShiki_c_ + NADP__c_ + H2O_c_; v_341();
    v_341 = 1;
  CCQH_c_: a_4CoumCoA_c_ + Quinate_c_ => a_4CoumQuin_c_ + CoA_c_; v_342();
    v_342 = 1;
  HCCST_c_: CaffShiki_c_ + CoA_c_ => Caff_CoA_c_ + Shikimate_c_; v_343();
    v_343 = 1;
  CAD3_c_: CoumAld_c_ + NADPH_c_ + H__c_ => Coum_Alc_c_ + NADP__c_; v_344();
    v_344 = 1;
  TCM01: THF_m_ => THF_c_; v_345();
    v_345 = 1;
  TCM02: Formate_c_ -> Formate_m_; v_346();
    v_346 = 1;
  TCM03: AMP_m_ + ATP_c_ + 2 H__c_ => AMP_c_ + ATP_m_ + 2 H__m_; v_347();
    v_347 = 1;
  TCM04: Pyr_c_ + H__c_ => Pyr_m_ + H__m_; v_348();
    v_348 = 1;
  TCM05: Asp_m_ + H__m_ -> Asp_c_ + H__c_; v_349();
    v_349 = 1;
  TCM06: Dhooro_c_ => Dhooro_m_; v_350();
    v_350 = 1;
  TCM07: Orot_m_ => Orot_c_; v_351();
    v_351 = 1;
  TCM08: Ala_m_ + H__m_ -> Ala_c_ + H__c_; v_352();
    v_352 = 1;
  TCM09: H2O_c_ -> H2O_m_; v_353();
    v_353 = 1;
  TCM10: CO2_c_ -> CO2_m_; v_354();
    v_354 = 1;
  TCM11: ammonia_c_ -> ammonia_m_; v_355();
    v_355 = 1;
  TCM12: O2_c_ -> O2_m_; v_356();
    v_356 = 1;
  TCM13: pi_c_ + H__c_ -> pi_m_ + H__m_; v_357();
    v_357 = 1;
  TCM14: Malate_m_ + OAA_c_ -> Malate_c_ + OAA_m_; v_358();
    v_358 = 1;
  TCM15: H2O2_c_ -> H2O2_m_; v_359();
    v_359 = 1;
  TCM16: ATP_m_ + ADP_c_ + H__c_ => ATP_c_ + ADP_m_ + H__m_; v_360();
    v_360 = 1;
  TCM17: GABA_c_ + H__m_ -> GABA_m_ + H__c_; v_361();
    v_361 = 1;
  TCM18: Succ_m_ + Fumr_c_ -> Fumr_m_ + Succ_c_; v_362();
    v_362 = 1;
  TCM19: Gly_m_ + H__m_ -> Gly_c_ + H__c_; v_363();
    v_363 = 1;
  TCM20: Ser_m_ + H__m_ -> Ser_c_ + H__c_; v_364();
    v_364 = 1;
  TCM21: Succ_c_ + Malate_m_ -> Succ_m_ + Malate_c_; v_365();
    v_365 = 1;
  TCM22: Citrate_m_ + Malate_c_ -> Citrate_c_ + Malate_m_; v_366();
    v_366 = 1;
  TCM23: Malate_c_ + pi_m_ -> pi_c_ + Malate_m_; v_367();
    v_367 = 1;
  TCM24: Malate_c_ + aKG_m_ => Malate_m_ + aKG_c_; v_368();
    v_368 = 1;
  TCM25: CoA_c_ => CoA_m_; v_369();
    v_369 = 1;
  TCM26: Acetate_c_ => Acetate_m_; v_370();
    v_370 = 1;
  TCM27: Asp_m_ + Glu_c_ => Asp_c_ + Glu_m_; v_371();
    v_371 = 1;
  TCP01: Asp_p_ + H__p_ -> Asp_c_ + H__c_; v_372();
    v_372 = 1;
  TCP02: Cys_p_ + H__p_ -> Cys_c_ + H__c_; v_373();
    v_373 = 1;
  TCP03: Gly_p_ + H__p_ -> Gly_c_ + H__c_; v_374();
    v_374 = 1;
  TCP04: His_p_ + H__p_ -> His_c_ + H__c_; v_375();
    v_375 = 1;
  TCP05: Ile_p_ + H__p_ -> Ile_c_ + H__c_; v_376();
    v_376 = 1;
  TCP06: Leu_p_ + H__p_ -> Leu_c_ + H__c_; v_377();
    v_377 = 1;
  TCP07: Lys_p_ + H__p_ -> Lys_c_ + H__c_; v_378();
    v_378 = 1;
  TCP08: Met_p_ + H__p_ -> Met_c_ + H__c_; v_379();
    v_379 = 1;
  TCP09: Phe_p_ + H__p_ -> Phe_c_ + H__c_; v_380();
    v_380 = 1;
  TCP10: Pro_p_ + H__p_ -> Pro_c_ + H__c_; v_381();
    v_381 = 1;
  TCP11: Ser_p_ + H__p_ -> Ser_c_ + H__c_; v_382();
    v_382 = 1;
  TCP12: Thr_p_ + H__p_ -> Thr_c_ + H__c_; v_383();
    v_383 = 1;
  TCP13: Trp_p_ + H__p_ -> Trp_c_ + H__c_; v_384();
    v_384 = 1;
  TCP14: Tyr_p_ + H__p_ -> Tyr_c_ + H__c_; v_385();
    v_385 = 1;
  TCP15: Val_p_ + H__p_ -> Val_c_ + H__c_; v_386();
    v_386 = 1;
  TCP16: p_Abenz_p_ => p_Abenz_c_; v_387();
    v_387 = 1;
  TCP17: THF_c_ => THF_p_; v_388();
    v_388 = 1;
  TCP18: Formate_c_ -> Formate_p_; v_389();
    v_389 = 1;
  TCP19: a_Glc_p_ => a_Glc_c_; v_390();
    v_390 = 1;
  TCP20: a_Glc1P_c_ + pi_p_ -> a_Glc1P_p_ + pi_c_; v_391();
    v_391 = 1;
  TCP21: a_Glc6P_c_ + pi_p_ -> a_Glc6P_p_ + pi_c_; v_392();
    v_392 = 1;
  TCP22: DHAP_c_ + pi_p_ -> DHAP_p_ + pi_c_; v_393();
    v_393 = 1;
  TCP23: a_3PG_p_ + pi_c_ -> a_3PG_c_ + pi_p_; v_394();
    v_394 = 1;
  TCP24: PEP_c_ + pi_p_ => PEP_p_ + pi_c_; v_395();
    v_395 = 1;
  TCP25: AMP_p_ + ATP_c_ + 2 H__c_ => AMP_c_ + ATP_p_ + 2 H__p_; v_396();
    v_396 = 1;
  TCP26: DHooro_p_ => DHooro_c_; v_397();
    v_397 = 1;
  TCP27: Orot_c_ => Orot_p_; v_398();
    v_398 = 1;
  TCP28: UTP_p_ -> UTP_c_; v_399();
    v_399 = 1;
  TCP29: H2O_c_ -> H2O_p_; v_400();
    v_400 = 1;
  TCP30: CO2_c_ -> CO2_p_; v_401();
    v_401 = 1;
  TCP31: Gln_p_ + Glu_c_ => Glu_p_ + Gln_c_; v_402();
    v_402 = 1;
  TCP32: ammonia_c_ -> ammonia_p_; v_403();
    v_403 = 1;
  TCP33: O2_c_ -> O2_p_; v_404();
    v_404 = 1;
  TCP34: pi_c_ + H__c_ -> pi_p_ + H__p_; v_405();
    v_405 = 1;
  TCP35: sulfate_c_ => sulfate_p_; v_406();
    v_406 = 1;
  TCP36: HomoCys_p_ => HomoCys_c_; v_407();
    v_407 = 1;
  TCP37: ATP_p_ + ADP_c_ + H__c_ -> ATP_c_ + ADP_p_ + H__p_; v_408();
    v_408 = 1;
  TCP38: 2 Glycolate_p_ + Glycerate_c_ -> 2 Glycolate_c_ + Glycerate_p_; v_409();
    v_409 = 1;
  TCP39: Malate_p_ + Fumr_c_ -> Fumr_p_ + Malate_c_; v_410();
    v_410 = 1;
  TCP40: Malate_p_ + OAA_c_ => OAA_p_ + Malate_c_; v_411();
    v_411 = 1;
  TCP41: Malate_p_ + aKG_c_ => aKG_p_ + Malate_c_; v_412();
    v_412 = 1;
  TCP42: Malate_c_ + Glu_p_ => Glu_c_ + Malate_p_; v_413();
    v_413 = 1;
  TCP43: Palmt_p_ => Palmt_c_; v_414();
    v_414 = 1;
  TCP44: Steat_p_ => Steat_c_; v_415();
    v_415 = 1;
  TCP45: Olet_p_ => Olet_c_; v_416();
    v_416 = 1;
  TCP46: Lolet_p_ => Lolet_c_; v_417();
    v_417 = 1;
  TCP47: Lolnt_p_ => Lolnt_c_; v_418();
    v_418 = 1;
  TCP48: CoA_c_ => CoA_p_; v_419();
    v_419 = 1;
end
